VAX := READPRN("D:\BMSTU\2k\1s\Electronics\lab_04\Palladiy\Design1.lvm")
I := VAX[:, 1]
U := VAX[:, 0]
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VAX = [
    0, 0;
    0.01, 3.68922e-6;
    0.02, 8.11711e-6;
    0.03, 1.3435e-5;
    0.04, 1.98251e-5;
    0.05, 2.75068e-5;
    0.06, 3.67444e-5;
    0.07, 4.7856e-5;
    0.08, 6.12243e-5;
    0.09, 7.73102e-5;
    0.1, 9.66683e-5;
    0.11, 0.000119966;
    0.12, 0.000148006;
    0.13, 0.000181755;
    0.14, 0.000222375;
    0.15, 0.000271263;
    0.16, 0.0003301;
    0.17, 0.00040091;
    0.18, 0.000486124;
    0.19, 0.000588666;
    0.2, 0.000712055;
    0.21, 0.000860523;
    0.22, 0.00103916;
    0.23, 0.00125409;
    0.24, 0.00151269;
    0.25, 0.00182384;
    0.26, 0.00219825;
    0.27, 0.00264882;
    0.28, 0.00319113;
    0.29, 0.00384403
]
Rb := 1
Is1 := 1
M := 1
Ft := 1
Given
0.16 == 0.0003301*Rb + ln((Is1 + 0.0003301)/Is1)*M*Ft
0.2 == 0.000712055*Rb + ln((Is1 + 0.000712055)/Is1)*M*Ft
0.22 == 0.00103916*Rb + ln((Is1 + 0.00103916)/Is1)*M*Ft
0.24 == 0.00151269*Rb + ln((Is1 + 0.00151269)/Is1)*M*Ft
[Rb; Is1; M; Ft] := Minerr(Rb, Is1, M, Ft) = [0.0376264; 1.79738e-5; 0.227019; 0.237804]
Idiod := 0, 10^-5 .. max(I)
Udiod(Idiod) := Idiod*Rb + ln((Is1 + Idiod)/Is1)*Ft*M
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