DATA := READPRN("D:\BMSTU\2k\1s\Electronics\lab_04\Palladiy\data.txt")
Vvar := DATA[:, 0]
Fmax := DATA[:, 1]
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DATA = [-10, 150374; -7.75, 143821; -5.5, 135849; -3.25, 124680; -1, 106371]
Vvar = [-10; -7.75; -5.5; -3.25; -1]
Fmax = [150374; 143821; 135849; 124680; 106371]
i := 0 .. 4
Lk := 10^-3
Ck := 70*10^-12
pi := 3.14
Fr[i] := Fmax[i]
Cd := -(Ck*Lk - 1/(4*Fr^2*pi^2))/Lk
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U := Vvar = [-10; -7.75; -5.5; -3.25; -1]
Cd = [1.05133e-9; 1.15585e-9; 1.30394e-9; 1.56112e-9; 2.17096e-9]
M := 0.5
VJ0 := 0.6
CJ0 := 10^-12
Given
Cd[0] == CJ0*(1 - U[0]/VJ0)^(-M)
Cd[3] == CJ0*(1 - U[3]/VJ0)^(-M)
Cd[4] == CJ0*(1 - U[4]/VJ0)^(-M)
[CJ0; VJ0; M] := Minerr(CJ0, VJ0, M) = [3.03829e-9; 0.760908; 0.400593]
[CJ0_True; VJ_True; M_True] := [2.789*10^-9; 0.75; 0.3852]
CJ0_error := 100*|CJ0_True - CJ0|/CJ0_True = 8.93849
VJ0_error := 100*|VJ_True - VJ0|/VJ_True = 1.45435
M_error := 100*|M_True - M|/M_True = 3.99608
